## Lennard-Jones Argon

# general setup
units				metal
atom_style		atomic
boundary			p p p

# system setup
lattice			fcc 6.228
region			box block 0 4 0 4 0 4
create_box		1 box
create_atoms	1 box
mass				1 39.948

# potential
pair_style		lj/cut 8.0
pair_coeff		1 1 0.010324 3.405

# initialization
velocity			all create 80 152586
timestep			0.00005

# neighorlist
neighbor 0.3 bin
neigh_modify	delay 0 every 5 check no

# log output frequency
thermo			100

# trajectory output
dump 1 all xyz 700 argon1_1_t_075.xyz
#dump_modify 1 unwrap yes

# ------ Equilibration and thermalisation ------

fix				NVT all nvt temp 89.00 89.85 0.010
run				200000
unfix		  NVT

# ------ Equilibration in nve ------

fix				NVE all nve
run				50000
# ------ Production in nve ------
run       70000


compute myRDF all rdf 1000
fix RDF all ave/time 10 10 100 c_myRDF[*] file argon_rdf.dat mode vector
run 700
